Jnt = {
  // this joint allows only for relative rotation of invisible segments around the z-axis and constraining their origins to be at the same position in the global coordinate system
  AnyRevoluteJoint Inv_TF = {
    Axis = z;
    AnyRefFrame &InvFemur = ..Seg.InvisibleFemur_TF;
    AnyRefFrame &InvTibia = ..Seg.InvisibleTibia;
  };

   AnyFunInterpol MovingAxisCutOffFunction_few_points = {
    Type = PiecewiseLinear ;
    T = {-180.0,..GS_Measures.TF_FE_90,..GS_Measures.TF_FE_0,180.0};
    Data = {{-1.0,-1.0,0.0,0.0}};
  };

  AnyVector Resampling_T = farr(-180.0,360/1000,1000);
  AnyFloat Resampling_Data = MovingAxisCutOffFunction_few_points(Resampling_T)';

  AnyFunInterpol MovingAxisCutOffFunction = {
    Type = Bspline ;
    T = .Resampling_T;
    Data = {.Resampling_Data};
  };


  AnyKinMeasureFunComb1 CutOffKneeFlexion = {
    Functions = {&.MovingAxisCutOffFunction};
    AnyKinMeasureLinComb knee_flexion = {
      AnyKinMeasure &knee_angles = ...Tibiofemoral_Measures.JCS_rotation;
      Coef  = {{1, 0, 0}};
      OutDim=1;
    };
  };

  //Re-establish knee.constraint.reactions based on drivers necessary to run moving-axis model
  AnyKinMeasureOrg Knee = {
    AnyKinEq Constraints = {
      AnyKinMeasure &InvisibleFemurMedialEFCDriver = .InvisibleFemurMedialEFCDriver_LinComb;
      AnyKinMeasure &InvisibleFemurLateralEFCDriver  = .InvisibleFemurLateralEFCDriver_LinComb;
      AnyKinMeasure &InvisibleFemurZRot = .InvisibleFemurZRot_org;
      AnyKinMeasure &InvisibleTibiaMedialEFCDriver = .InvisibleTibiaMedialEFCDriver_LinComb;
      AnyKinMeasure &InvisibleTibiaLateralEFCDriver = .InvisibleTibiaLateralEFCDriver_LinComb;
      AnyKinMeasure &InvisibleTibiaZRot = .InvisibleTibiaZRot_org;
    };

    // this driver constrains a medial point on the invisible femur to a position in between the medial EFC and FFC nodes, dependent on the tibiofemoral flexion
    AnyKinMeasureLinComb InvisibleFemurMedialEFCDriver_LinComb = {
      Coef = {{1.0,0.0,0.0,1.0/(1.0)*(...Seg.Thigh.KneeJointAnatomicalFrame.Medial_TF_FFC.sRel[0]-...Seg.Thigh.KneeJointAnatomicalFrame.Medial_TF_EFC.sRel[0])},
        {0.0,1.0,0.0,1.0/(1.0)*(...Seg.Thigh.KneeJointAnatomicalFrame.Medial_TF_FFC.sRel[1]-...Seg.Thigh.KneeJointAnatomicalFrame.Medial_TF_EFC.sRel[1])},
        {0.0,0.0,1.0,1.0/(1.0)*(...Seg.Thigh.KneeJointAnatomicalFrame.Medial_TF_FFC.sRel[2]-...Seg.Thigh.KneeJointAnatomicalFrame.Medial_TF_EFC.sRel[2])}};
      Const ={0.0,0.0,0.0};
      AnyKinLinear FemurTrans = {
        Ref = 0;
        AnyRefFrame &ref1 = ....Seg.Thigh.KneeJointAnatomicalFrame.Medial_TF_EFC;
        AnyRefFrame &ref2 = ....Seg.InvisibleFemur_TF.MA_AnatomicalFrame.Medial_TF_EFC;
      };
      AnyKinMeasure &KneeFlexion = ..CutOffKneeFlexion;
      OutDim = 3;
    };

    // this driver constrains the x and y coordinates of a lateral point on the invisible femur to a position between the lateral EFC and FFC nodes with respect to tibiofemoral flexion
    AnyKinMeasureLinComb InvisibleFemurLateralEFCDriver_LinComb = {
      Coef = {{1.0,0.0,1.0/(1.0)*(...Seg.Thigh.KneeJointAnatomicalFrame.Lateral_TF_FFC.sRel[0]-...Seg.Thigh.KneeJointAnatomicalFrame.Lateral_TF_EFC.sRel[0])},{0.0,1.0,1.0/(1.0)*(...Seg.Thigh.KneeJointAnatomicalFrame.Lateral_TF_FFC.sRel[1]-...Seg.Thigh.KneeJointAnatomicalFrame.Lateral_TF_EFC.sRel[1])}};
      Const ={0.0,0.0};
      AnyKinMeasureOrg org = {
        AnyKinLinear FemurTrans = {
          Ref = 0;
          AnyRefFrame &ref1 = .....Seg.Thigh.KneeJointAnatomicalFrame.Lateral_TF_EFC;
          AnyRefFrame &ref2 = .....Seg.InvisibleFemur_TF.MA_AnatomicalFrame.Lateral_TF_EFC;
        };
        MeasureOrganizer = {0,1};
      };
      AnyKinMeasure &KneeFlexion = ..CutOffKneeFlexion;
      OutDim = 2;
    };

    // this driver ensures that there will be zero rotation about the z-axis of the invisible femur relative to the femoral anatomical frame
    AnyKinMeasureOrg InvisibleFemurZRot_org = {
      AnyKinRotational rot = {
        Type = RotAxesAngles;
        Axis1 = z;
        Axis2 = x;
        Axis3 = y;
        AnyRefFrame &ref1 = ....Seg.Thigh.KneeJointAnatomicalFrame.InvisibleFemurRotationNode;
        AnyRefFrame &ref2 = ....Seg.InvisibleFemur_TF;
      };
      MeasureOrganizer = {0};
    };

    // this driver constrains a medial point on the invisible tibia to a position in between the medial EFC and FFC nodes, dependent on the tibiofemoral flexion
    AnyKinMeasureLinComb InvisibleTibiaMedialEFCDriver_LinComb = {
      Coef = {{1.0,0.0,0.0,1.0/( 1.0)*(...Seg.Shank.KneeJointAnatomicalFrame.Medial_TF_FFC.sRel[0]-...Seg.Shank.KneeJointAnatomicalFrame.Medial_TF_EFC.sRel[0])},{0.0,1.0,0.0,1.0/( 1.0)*(...Seg.Shank.KneeJointAnatomicalFrame.Medial_TF_FFC.sRel[1]-...Seg.Shank.KneeJointAnatomicalFrame.Medial_TF_EFC.sRel[1])},{0.0,0.0,1.0,1.0/( 1.0)*(...Seg.Shank.KneeJointAnatomicalFrame.Medial_TF_FFC.sRel[2]-...Seg.Shank.KneeJointAnatomicalFrame.Medial_TF_EFC.sRel[2])}};
      Const ={0.0,0.0,0.0};
      AnyKinLinear TibiaTrans = {
        Ref = 0;
        AnyRefFrame &ref1 = ....Seg.Shank.KneeJointAnatomicalFrame.Medial_TF_EFC;
        AnyRefFrame &ref2 = ....Seg.InvisibleTibia.MA_AnatomicalFrame.Medial_TF_EFC;
      };
      AnyKinMeasure &KneeFlexion = ..CutOffKneeFlexion;
      OutDim = 3;
    };

    // this driver constrains the x and y coordinates of a lateral point on the invisible tibia to a position between the lateral EFC and FFC nodes with respect to tibiofemoral flexion
    AnyKinMeasureLinComb InvisibleTibiaLateralEFCDriver_LinComb = {
      Coef = {{1.0,0.0,1.0/( 1.0)*(...Seg.Shank.KneeJointAnatomicalFrame.Lateral_TF_FFC.sRel[0]-...Seg.Shank.KneeJointAnatomicalFrame.Lateral_TF_EFC.sRel[0])},{0.0,1.0,1.0/( 1.0)*(...Seg.Shank.KneeJointAnatomicalFrame.Lateral_TF_FFC.sRel[1]-...Seg.Shank.KneeJointAnatomicalFrame.Lateral_TF_EFC.sRel[1])}};
      Const ={0.0,0.0};
      AnyKinMeasureOrg org = {
        AnyKinLinear TibiaTrans = {
          Ref = 0;
          AnyRefFrame &ref1 = .....Seg.Shank.KneeJointAnatomicalFrame.Lateral_TF_EFC;
          AnyRefFrame &ref2 = .....Seg.InvisibleTibia.MA_AnatomicalFrame.Lateral_TF_EFC;
        };
        MeasureOrganizer = {0,1};
      };
      AnyKinMeasure &KneeFlexion = ..CutOffKneeFlexion;
      OutDim = 2;
    };

    // this driver ensures that there will be zero rotation about the z-axis of the invisible tibia relative to the tibial anatomical frame
    AnyKinMeasureOrg InvisibleTibiaZRot_org = {
      AnyKinRotational rot = {
        Type = RotAxesAngles;
        Axis1 = z;
        Axis2 = x;
        Axis3 = y;
        AnyRefFrame &ref1 = ....Seg.Shank.KneeJointAnatomicalFrame.InvisibleFemurRotationNode;
        AnyRefFrame &ref2 = ....Seg.InvisibleTibia;
      };
      MeasureOrganizer = {0};
    };
  };
};
