Jnt = {
  AnyRevoluteJoint Knee = {
    Axis = z;
    AnyRefFrame &Femur = ..Seg.Thigh.KneeJointAnatomicalFrame.KneeJoint;
    AnyRefFrame &Tibia = ..Seg.Shank.KneeJointAnatomicalFrame.KneeJoint;
  };

};
